(n*(3*n - 1)/2 + 2*n^2 + n*(n^2 - 3*n + 6)/2) simplify → n*(n^2 + 4*n + 5)/2
n + 3*sum(i - 1, i = 1 .. n) simplify → n*(3*n - 1)/2
sum(sum(2, k = 1 .. i - 1), i = 1 .. n) simplify → n*(n - 1)
2*n + 3*sum(sum(j - 1, j = 1 .. i - 1), i = 1 .. n) simplify → n*(n^2 - 3*n + 6)/2
2*sum((n - 1 - i)*(n - i), i = 2 .. n - 2) simplify → 2*(n - 1)*(n - 2)*(n - 3)/3
n + 2*sum(i - 1, i = 1 .. n) simplify → n^2
n + 1*sum(sum(2, k = i + 1 .. n), i = 1 .. n) simplify → n^2
sum(1, k = i + 1 .. n) simplify → n - i
n + n(n - j) simplify → n + n(n - j)
